units		    real
boundary        p  p  p
atom_style	    full
dielectric      1
kspace_style    pppm 1.0e-5

read_data       relaxed_structure.data

#�ڽ�
neighbor     2.0 bin
neigh_modify one 5000
neigh_modify every 1  delay 0 check yes

#Force Field
pair_style         hybrid/overlay  eam lj/cut/coul/long 12.0 hbond/dreiding/lj 4 6 6.5 90
special_bonds      lj/coul 0 0 0.5
pair_modify        mix arithmetic tail yes

pair_coeff    1  1     lj/cut/coul/long  0.9570E-01  3.03315 # O_3
pair_coeff    2  2     lj/cut/coul/long  0.9510E-01  3.47299 # C_3
pair_coeff    3  3     lj/cut/coul/long  0.1520E-01  2.84642 # H_
pair_coeff    4  4     lj/cut/coul/long  0.7740E-01  3.26256 # N_2
pair_coeff    5  5     lj/cut/coul/long  0.7740E-01  3.26256 # N_1
pair_coeff    6  6     lj/cut/coul/long  0.9510E-01  3.47299 # C_R
pair_coeff    7  7     lj/cut/coul/long  0.7740E-01  3.26256 # N_R
pair_coeff    8  8     lj/cut/coul/long  0.7740E-01  3.26256 # N_3
pair_coeff    9  9     lj/cut/coul/long  0.9510E-01  3.47299 # C_2
pair_coeff    10  10   lj/cut/coul/long  0.9510E-01  3.47299 # C_1
pair_coeff    11  11   lj/cut/coul/long  0.9570E-01  3.03315 # O_2
pair_coeff    12  12   lj/cut/coul/long  0.1000E-03  2.84642 # H___A
pair_coeff    13  13   lj/cut/coul/long  0.9510E-01  3.47299 # C_32
pair_coeff    14  14   eam Al_jnp_real.eam
pair_coeff    15  15   lj/cut/coul/long  0.9570E-01  3.03315 # O_R

pair_coeff 	1	14  lj/cut/coul/long	1.72E-01	3.4721	    #	Al	O_3
pair_coeff	2	14	lj/cut/coul/long	1.72E-01	3.69202 	#	Al	C_3
pair_coeff	3	14  lj/cut/coul/long	6.86E-02	3.378735	#	Al	H_
pair_coeff	4	14	lj/cut/coul/long	1.55E-01	3.586805	#	Al	N_2
pair_coeff	5	14	lj/cut/coul/long	1.55E-01	3.586805	#	Al	N_1
pair_coeff	6	14	lj/cut/coul/long	1.72E-01	3.69202	    #	Al	C_R
pair_coeff	7	14	lj/cut/coul/long	1.55E-01	3.586805	#	Al	N_R
pair_coeff	8	14	lj/cut/coul/long	1.55E-01	3.586805	#	Al	N_3
pair_coeff	9	14	lj/cut/coul/long	1.72E-01	3.69202 	#	Al	C_2
pair_coeff	10	14	lj/cut/coul/long	1.72E-01	3.69202	    #	Al	C_1
pair_coeff	11	14	lj/cut/coul/long	1.72E-01	3.4721	    #	Al	O_2
pair_coeff	12	14	lj/cut/coul/long	5.57E-03	3.378735	#	Al	H___A
pair_coeff	13	14	lj/cut/coul/long	1.72E-01	3.69202 	#	Al	C_32
pair_coeff	14	15	lj/cut/coul/long	1.72E-01	3.4721	    #	Al	O_R


pair_coeff  8   15   hbond/dreiding/lj   12  j 4.00000  2.7500 4 6 6.5 90 # H___A-O_R-N_3


bond_style		harmonic

bond_coeff  1     350.0000  1.4200 # O_3-C_3
bond_coeff  2     350.0000  1.5300 # C_3-C_3
bond_coeff  3     350.0000  1.0900 # C_3-H_
bond_coeff  4     350.0000  1.3750 # C_3-N_2
bond_coeff  5     350.0000  1.1610 # N_2-N_1
bond_coeff  6     350.0000  1.3200 # O_3-C_2
bond_coeff  7     525.0000  1.3900 # C_R-C_R
bond_coeff  8     525.0000  1.3400 # C_R-N_R
bond_coeff  9     350.0000  1.4600 # C_3-C_R
bond_coeff  10     350.0000  1.0200 # H_-C_R
bond_coeff  11     350.0000  1.3920 # C_R-N_3
bond_coeff  12     350.0000  1.2420 # N_R-C_1
bond_coeff  13     350.0000  1.3620 # N_3-C_2
bond_coeff  14     350.0000  1.0220 # H___A-N_3
bond_coeff  15     700.0000  1.2200 # O_2-C_2
bond_coeff  16     700.0000  1.1520 # C_1-O_2
bond_coeff  17     350.0000  1.5300 # C_32-C_32
bond_coeff  18     350.0000  1.4200 # C_32-O_3
bond_coeff  19     350.0000  1.4200 # O_R-C_3
bond_coeff  20     350.0000  0.9800 # O_R-H___A


angle_style		harmonic

angle_coeff  1     50  104.5100 # C_3-O_3-C_3
angle_coeff  2     50  109.4710 # O_3-C_3-C_3
angle_coeff  3     50  109.4710 # C_3-C_3-H_
angle_coeff  4     50  109.4710 # O_3-C_3-H_
angle_coeff  5     50  109.4710 # H_-C_3-H_
angle_coeff  6     50  109.4710 # C_3-C_3-C_3
angle_coeff  7     50  109.4710 # N_2-C_3-C_3
angle_coeff  8     50  109.4710 # N_2-C_3-H_
angle_coeff  9     50  120.0000 # C_3-N_2-N_1
angle_coeff  10     50  180.0000 # N_2-N_1-N_2
angle_coeff  11     50  104.5100 # C_3-O_3-C_2
angle_coeff  12     50  120.0000 # C_R-C_R-C_R
angle_coeff  13     50  120.0000 # C_R-C_R-N_R
angle_coeff  14     50  120.0000 # C_3-C_R-C_R
angle_coeff  15     50  120.0000 # H_-C_R-C_R
angle_coeff  16     50  120.0000 # C_R-C_R-N_3
angle_coeff  17     50  109.4710 # H_-C_3-C_R
angle_coeff  18     50  120.0000 # C_R-N_R-C_1
angle_coeff  19     50  106.7000 # C_R-N_3-C_2
angle_coeff  20     50  106.7000 # H___A-N_3-C_R
angle_coeff  21     50  106.7000 # H___A-N_3-C_2
angle_coeff  22     50  120.0000 # O_3-C_2-N_3
angle_coeff  23     50  120.0000 # O_2-C_2-N_3
angle_coeff  24     50  120.0000 # O_3-C_2-O_2
angle_coeff  25     50  180.0000 # N_R-C_1-O_2
angle_coeff  26     50  109.4710 # oh-C_3-C_3   # O_3-C_32-C_32
angle_coeff  27     50  104.5100 # C_3-O_3-C_3   # C_32-O_3-C_32
angle_coeff  28     50  104.5100 # C_3-O_3-C_2  # C_2-O_3-C_32
angle_coeff  29     50  109.4710 # C_5-C_5-oh   # C_3-C_3-O_R
angle_coeff  30     50  109.4710 # oh-C_3-H_   # H_-C_3-O_R
angle_coeff  31     50  104.5100 # C_3-oh-H___A   # H__A-O_R-C_3


dihedral_style  harmonic

dihedral_coeff  1     1.0000    1  3 # C_3-O_3-C_3-C_3
dihedral_coeff  2     1.0000    1  3 # C_3-O_3-C_3-H_
dihedral_coeff  3     1.0000    1  3 # O_3-C_3-C_3-C_3
dihedral_coeff  4     1.0000    1  3 # C_3-C_3-C_3-H_
dihedral_coeff  5     1.0000    1  3 # N_2-C_3-C_3-C_3
dihedral_coeff  6     1.0000    1  3 # C_2-O_3-C_3-C_3
dihedral_coeff  7     1.0000    1  3 # C_2-O_3-C_3-H_
dihedral_coeff  8     1.0000    1  3 # N_1-N_2-C_3-C_3
dihedral_coeff  9     1.0000    1  3 # N_1-N_2-C_3-H_
dihedral_coeff 10     0.0000   -1  0 # C_3-N_2-N_1-N_2
dihedral_coeff 11     1.0000    1  3 # C_3-O_3-C_2-N_3
dihedral_coeff 12     1.0000    1  3 # C_3-O_3-C_2-O_2
dihedral_coeff 13     12.5000  -1  2 # H_-C_R-C_R-H_   # H_-C_3-C_3-H_
dihedral_coeff 14     1.0000    1  3 # O_3-C_3-C_3-H_
dihedral_coeff 15     1.0000    1  3 # C_3-C_3-C_3-C_3
dihedral_coeff 16     12.5000  -1  2 # C_R-C_R-C_R-C_R
dihedral_coeff 17     12.5000  -1  2 # C_3-C_R-C_R-C_R
dihedral_coeff 18     12.5000  -1  2 # C_R-C_R-C_R-N_R
dihedral_coeff 19     12.5000  -1  2 # C_3-C_R-C_R-N_R
dihedral_coeff 20     12.5000  -1  2 # H_-C_R-C_R-C_R
dihedral_coeff 21     12.5000  -1  2 # H_-C_R-C_R-N_R
dihedral_coeff 22     12.5000  -1  2 # C_R-C_R-N_R-C_1
dihedral_coeff 23     12.5000  -1  2 # C_3-C_R-C_R-H_
dihedral_coeff 24     0.5000   -1  6 # H_-C_3-C_R-C_R
dihedral_coeff 25     12.5000  -1  2 # H_-C_R-C_R-H_
dihedral_coeff 26     12.5000  -1  2 # C_R-C_R-C_R-N_3
dihedral_coeff 27     12.5000  -1  2 # H_-C_R-C_R-N_3
dihedral_coeff 28     0.5000   -1  6 # C_R-C_R-N_3-C_2
dihedral_coeff 29     0.5000   -1  6 # C_R-C_R-N_3-H___A
dihedral_coeff 30     0.0000   -1  0 # C_R-N_R-C_1-O_2
dihedral_coeff 31     1.0000    1  3 # C_R-N_3-C_2-O_3
dihedral_coeff 32     1.0000    1  3 # C_R-N_3-C_2-O_2
dihedral_coeff 33     1.0000    1  3 # H___A-N_3-C_2-O_3
dihedral_coeff 34     1.0000    1  3 # H___A-N_3-C_2-O_2
dihedral_coeff 35     12.5000  -1  2 # C_3-C_R-C_R-N_3
dihedral_coeff 36     1.0000    1  3 # C_32-O_3-C_2-N_3
dihedral_coeff 37     1.0000    1  3 # C_32-O_3-C_2-O_2
dihedral_coeff 38     1.0000    1  3 # O_3-C_3-C_3-O_3
dihedral_coeff 39     1.0000    1  3 # C_2-O_3-C_32-C_32
dihedral_coeff 40     1.0000    1  3 # C_32-O_3-C_32-C_32
dihedral_coeff 41     1.0000    1  3 # O_R-C_3-C_3-C_3
dihedral_coeff 42    1.0000    1  3 # H___A-oh-C_3-C_3   # C_3-C_3-O_R-H___A
dihedral_coeff 43     1.0000    1  3 # H___A-oh-C_3-H_   # H_-C_3-O_R-H___A


improper_style     umbrella

improper_coeff     1     40.0000    0.0000 # C_R-C_R-C_R-N_R
improper_coeff     2     40.0000    0.0000 # C_3-C_R-C_R-C_R
improper_coeff     3     40.0000    0.0000 # H_-C_R-C_R-C_R
improper_coeff     4     40.0000    0.0000 # C_R-C_R-C_R-N_3
improper_coeff     5     40.0000    0.0000 # H___A-N_3-C_R-C_2  # C_R-N_3-C_2-H___A
improper_coeff     6     40.0000    0.0000 # O_3-C_2-O_2-N_3   # O_3-C_2-N_3-O_2

# Data Output Configuration
thermo 1000
thermo_style custom step temp press density atoms vol lx ly lz ke pe

# Relaxation
####################################################
fix 1 all npt temp 600 600 100.0 iso 1.0 1.0 1000
timestep 1
run 1000000
unfix 1
reset_timestep 0

# Annealing
####################################################
fix 3 all print 1000 "${f3} ${f1} ${f2} " file polymer_cooled.txt screen no
####################################################
variable mytemp index 600 580 560 540 520 500 480 460 440 420 400 380 360 340 320 300 280 260 240 220 200
variable f1 equal "temp"
variable f2 equal "density"
variable f3 equal "step"

variable i loop 21

label loopa

fix 2 all npt temp ${mytemp} ${mytemp} 100.0 iso 1.0 1.0 1000


timestep 1
run 500000
unfix 2
reset_timestep 0

next mytemp
next i
jump SELF loopa

# The simulation achieved normal termination, and all output files are complete
write_data      Al_1_anneal.data
write_restart   Al_1_anneal.restart
